x := 2
n := 10
y := (sqrt(x^3 + n) + cos(|n*x - 1|))*sin(π*n/2)^2/(nthroot(x^5 + 8*x + n, 4)*cos((x + n)*π/4))
y = -7.10705e-31
f(x) := (x^2 - n*x + cos(x))*sqrt(|x - sin(x*n)|)
x1 := -2
x2 := 2
Δx := 0.4
x := x1, x1 + Δx .. x2
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filename := "Mas_A.txt"
A := READPRN(filename)
A = [3, 5, 9; 2, -9, 0; 2, 5, -5]
a := -2*n
b := 2*n
B := [0, 7, 8, 2; -6, 7, -2, 1; 5, 4, 2, 3]
V := rnorm(3, a, b)
V = [-28.7794; -33.5881; -29.4657]
c := max(A) - min(A)
c = 18
sB := sum(sum(B[i, j], j = 0 .. cols(B) - 1), i = 0 .. rows(B) - 1)/(rows(B)*cols(B))
sB = 2.58333
sV := sum(V[i]^2, i = 0 .. length(V) - 1)
sV = 2824.64
W := [max(B[:, 0]); max(B[:, 1]); max(B[:, 2])]
W = [5; 7; 8]
filename := "Matr_W.txt"
WRITEPRN(filename) := W
A = [3, 5, 9; 2, -9, 0; 2, 5, -5]
A := [n, n + 1, n + 2; n - 3, n - 2, n; n - 1, n, n + 1]
B := [6*n + 8; 6*n - 7; 6*n + 2]
B = [68; 53; 62]
[x; y; z] := A^-1*B
X := [x; y; z]
X = [1; 2; 3]
C := A*X
C = [68; 53; 62]
x1 := -3*π
y(t) := e^(-(|t|/3))*cos(t)
x2 := 3*π
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x1 := -9
x2 := 9
Δx := 0.25
x := x1, x1 + Δx .. x2
f(x) :=
    e^x*x^3 if x < 0
    e^(-x)*x^3 if x ≥ 0
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x1 := 0
x2 := 20
Δx := 0.1
x := x1, x1 + Δx .. x2
X := x
g(x) := (sqrt(x)*sin(x))
x = [
    0; 0.1; 0.2; 0.3; 0.4; 0.5; 0.6; 0.7; 0.8; 0.9
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]
g(x) = [
    0; 0.0315701; 0.0888476; 0.161863; 0.24629; 0.339005; 0.43737; 0.538991; 0.641623; 0.743129
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]
x1 := -3
q(p) := e^(-p^2)
x2 := 3
q'(p) := d/dp(q(p))
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f(x, y) := sin(sqrt(x^2 + y^2))/sqrt(x^2 + y^2)
# [component: inputs f]
