x := 3
y := x + 7
f(x, y) := x^2 + y^2
f_y(x, y) := x^2 + 2*x*y
f(x, y) := y*x^2 + x*y^2
f_x(x, y) := 2*x*y + y^2
f(x, y) := x + y
x := 7
y := 12
z := 3
p := sqrt(x^2 + y^2) + z/2
p = 15.3924
f(2, 3) = 5
f(p, 2*p) = 46.1773
f(x) := x^2
t := 1, 1.5 .. 3
z := 0 .. 3
f(t) = [1; 2.25; 4; 6.25; 9]
f(z) = [0; 1; 4; 9]
a := 100
c := 2.47*10^-3
b := 4.675
z1 := 7*1i
z2 := 2 + 3*1i
z3 := 2*e^(5*1i)
e = 2.71828
π = 3.14159
∞ = 1e307
s := "Hello world!"
filename := "d:\work\lab1.xmcd"
A := [6, 5, 4; 8, 7, 9; 2, 4, 1]
V := [1; 5; 8]
A[0, 0] = 6
A[1, 2] = 9
V[1] = 5
filename := "Matr.txt"
M := READPRN(filename)
M = [1, 5, 7; 8, 9, 2]
P := [1, 5, 7; 8, 9, 2]
filename := "Matr_P.txt"
WRITEPRN(filename) := P
a := 5
b := 7
c := 10
x := if(a > b, a + b, a - b)
x = -2
y := if((a > b)*(a > 5), a^2 + b^2, a + b)
y = 12
z := if((a < b) + (a > 5), a^2 + b^2, a + b)
z = 74
f(x) := x*sin(x)
Δx := π/10
x1 := -3*π
x2 := 3*π
x := x1, x1 + Δx .. x2
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f2(x) := 3*e^(-(x/2))
f1(x) := sqrt(|x|)
x1 := -9
x2 := 9
Δx := 0.1
t1 := 0
t2 := 8
Δt := 0.2
t := t1, t1 + Δt .. t2
x := x1, x1 + Δx .. x2
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f(x) := sin(x)^2
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g(x) := x^2/5
f(x) := |sin(x)|
x2 := π
x1 := -π
Δx := π/10
x := x1, x1 + Δx .. x2
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f(x, y) := x^2 + y^2
x2 := 5
x1 := -5
Δx := 0.4
Nx := (x2 - x1)/Δx
Nx = 25
Δy := 0.4
y1 := -5
y2 := 5
Ny := (y2 - y1)/Δy
Ny = 25
i := 0 .. Nx
x[i] := x1 + i*Δx
j := 0 .. Ny
y[j] := y1 + j*Δy
M[i, j] := f(x[i], y[j])
# [component: inputs M]
f(x, y) := x^2 - y^2
# [component: inputs f]
g(x, y) := x^2 + y^2
# [component: inputs g]
# [component: inputs g]
# [component: inputs [(g, g), □]]
B := [3, 2, 1; 6, 5, 9; 9, 7, 7]
A := [1, 2, 4; 6, 7, 9; 4, 7, 8]
C := A*B
C = [51, 40, 47; 141, 110, 132; 126, 99, 123]
V := [1; 6; 9]
P := A*V
P = [49; 129; 118]
transpose(V) = [1, 6, 9]
transpose(A) = [1, 6, 4; 2, 7, 7; 4, 9, 8]
D := |A|
D = 25
S := A^-1
S = [-0.28, 0.48, -0.4; -0.48, -0.32, 0.6; 0.56, 0.04, -0.2]
I := A*A^-1
I = [1, 0, 0; 0, 1, 0; 0, 0, 1]
W := [2; 5; 7]
P := W*V
P = 95
s := sum(V)
s = 16
Y := A[:, 1]
Y = [2; 7; 7]
Z := transpose(A)[:, 1]
transpose(Z) = [6, 7, 9]
n := rows(A)
n = 3
m := cols(A)
m = 3
Bmax := max(B)
Bmax = 9
Bmin := min(B)
Bmin = 1
k := length(V)
k = 3
m := last(V)
m = 2
I := identity(2)
I = [1, 0; 0, 1]
T := diag(V)
T = [1, 0, 0; 0, 6, 0; 0, 0, 9]
Sp := tr(A)
Sp = 16
f(x) := 3*x*e^(-x)
Δx := 0.1
x1 := 0
x2 := 5
N := (x2 - x1)/Δx
i := 0 .. N
X[i] := x1 + i*Δx
Y[i] := f(X[i])
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vectorize(cos(V)) = [0.540302; 0.96017; -0.91113]
vectorize(sin(A)) = [0.841471, 0.909297, -0.756802; -0.279415, 0.656987, 0.412118; -0.756802, 0.656987, 0.989358]
B := [5; 6; -1]
A := [2, 3, -1; 1, -2, 3; 3, 1, -2]
[x; y; z] := A^-1*B
z = 3
X := [x; y; z]
y = 2
X = [1; 2; 3]
x = 1
X := lsolve(A, B)
X = [1; 2; 3]
