# Даны 2 отрезка прямых в мск X0Y:
# AB c коорд. А(2 12) и В(5, 9);  CD с коорд. С(2 3) и D(5 6)
Ax := 2
Bx := 5
Cx := 2
Dx := 5
Ay := 12
By := 9
Cy := 3
Dy := 6
ABx := [Ax; Bx]
ABy := [Ay; By]
CDx := [Cx; Dx]
CDy := [Cy; Dy]
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(x - 2)/(5 - 2) = (y - 12)/(9 - 12)  # error: Эта переменная не определена.
(x - 2)/3 = (y - 12)/(-3)  # error: Эта переменная не определена.
# и тд
f1(x) := -x + 14
f2(x) := x + 1
# Найдем т. пересечения: f1 = f2; x + 1 = -x + 14; 2x = 13;
# x = 6,5; y = 7,5
x0 := 6.5
y0 := 7.5
# СК X0Y надо повернуть на π
Rs := [cos(π), -sin(π), 0; sin(π), cos(π), 0; 0, 0, 1] = [-1, 0, 0; 0, -1, 0; 0, 0, 1]
A0 := [x0; y0; 1] = [6.5; 7.5; 1]
A1 := Rs*[Ax - x0; Ay - y0; 1] + [x0; y0; 1] = [11; 3; 2]
B1 := Rs*[Bx - x0; By - y0; 1] + [x0; y0; 1] = [8; 6; 2]
C1 := Rs*[Cx - x0; Cy - y0; 1] + [x0; y0; 1] = [11; 12; 2]
D1 := Rs*[Dx - x0; Dy - y0; 1] + [x0; y0; 1] = [8; 9; 2]
ABx1 := [A1[0]; B1[0]] = [11; 8]
ABy1 := [A1[1]; B1[1]] = [3; 6]
CDx1 := [C1[0]; D1[0]] = [11; 8]
CDy1 := [C1[1]; D1[1]] = [12; 9]
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