# Координаты вершин пирамиды (C, B, A, C1, B1, A1), параметры положения камеры:
PIR := [0, 0, 3, 0, 0, 1; 3, 0, 0, 1, 0, 0; 0, 0, 0, 3, 3, 3; 1, 1, 1, 1, 1, 1]
PV := [10; 335; 45]
pC := submatrix(PIR, 0, 2, 0, 0) = [0; 3; 0]
pC1 := submatrix(PIR, 0, 2, 3, 3) = [0; 1; 3]
pB := submatrix(PIR, 0, 2, 1, 1) = [0; 0; 0]
pB1 := submatrix(PIR, 0, 2, 4, 4) = [0; 0; 3]
pA := submatrix(PIR, 0, 2, 2, 2) = [3; 0; 0]
pA1 := submatrix(PIR, 0, 2, 5, 5) = [1; 0; 3]
# Cферические координаты точки наблюдения:
r_v := PV[0] = 10
ϕ_v := PV[1]*π/180 = 5.84685
θ_v := PV[2]*π/180 = 0.785398
# Задаем положение секущей плоскости в МСК XYZ
# Угол между осью z и вектором нормали к секущей плоскости
ϕ_grad := 33
ϕ := ϕ_grad/180*π = 0.575959
# Вектор нормали к секущей плоскости
N := transpose([0, sin(ϕ), cos(ϕ)]) = [0; 0.544639; 0.838671]
# Координаты точки пересечения оси Z (ребра BB1) и секущей плоскости
x_0 := 0
y_0 := 0
z_0 := 3/4*PIR[:, 3][2] = 2.25
# Задаем параметры уравнения секущей плоскости
D := -(N[0]*x_0 + N[1]*y_0 + N[2]*z_0) = -1.88701
# Находим точку пересечения P1 секущей плоскости с ребром CС1
V1 := pC = [0; 3; 0]
V2 := pC1 = [0; 1; 3]
ΔV := V2 - V1 = [0; -2; 3]
t_AD1 := -((N*V1 + D)/(N*ΔV)) = 0.177392
Vad := V1 + ΔV*t_AD1 = [0; 2.64522; 0.532177]
x_AD := Vad[0] = 0
y_AD := Vad[1] = 2.64522
z_AD := Vad[2] = 0.532177  # - координаты точки P1
# Находим точку пересечения P2 секущей плоскости с ребром AA1
V1 := pA = [3; 0; 0]
V2 := pA1 = [1; 0; 3]
ΔV := V2 - V1 = [-2; 0; 3]
t_CF := -((N*V1 + D)/(N*ΔV)) = 0.75
V_CF := V1 + ΔV*t_CF = [1.5; 0; 2.25]
x_CF := V_CF[0] = 1.5
y_CF := V_CF[1] = 0
z_CF := V_CF[2] = 2.25  # - координаты точки Р2
# Находим точку пересечения P3 секущей плоскости с ребром BB1
V1 := pB = [0; 0; 0]
V2 := pB1 = [0; 0; 3]
ΔV := V2 - V1 = [0; 0; 3]
t_BE := -((N*V1 + D)/(N*ΔV)) = 0.75
V_BE := V1 + ΔV*t_BE
x_BE := V_BE[0] = 0
y_BE := V_BE[1] = 0
z_BE := V_BE[2] = 2.25  # - координаты точки Р3
# Матрица мировых коорднат точек P1, P2, P3 (сечение)
TR := [x_AD, x_CF, x_BE; y_AD, y_CF, y_BE; z_AD, z_CF, z_BE; 1, 1, 1] = [0, 1.5, 0; 2.64522, 0, 0; 0.532177, 2.25, 2.25; 1, 1, 1]
# Матрица пересчета МСК в ВСК
K_view := [
    -sin(ϕ_v), cos(ϕ_v), 0, 0;
    -cos(θ_v)*cos(ϕ_v), -cos(θ_v)*sin(ϕ_v), sin(θ_v), 0;
    -sin(θ_v)*cos(ϕ_v), -sin(θ_v)*sin(ϕ_v), -cos(θ_v), r_v;
    0, 0, 0, 1
] = [
    0.422618, 0.906308, 0, 0;
    -0.640856, 0.298836, 0.707107, 0;
    -0.640856, 0.298836, -0.707107, 10;
    0, 0, 0, 1
]
# Вычисляем координаты вершин пирамиды в ВСК
PIR_V := K_view*PIR = [
    2.71892, 0, 1.26785, 0.906308, 0, 0.422618;
    0.896509, 0, -1.92257, 2.42016, 2.12132, 1.48046;
    10.8965, 10, 8.07743, 8.17752, 7.87868, 7.23782;
    1, 1, 1, 1, 1, 1
]
# Вычисляем координаты вершин треугольника сечения Р1, Р2, Р3 в ВСК
TR_V := K_view*TR = [2.39738, 0.633927, 0; 1.16679, 0.629706, 1.59099; 10.4142, 7.44773, 8.40901; 1, 1, 1]
# Определяем координаты проекции вершин пирамиды на картинную плоскость (без координат по Z)
P_XY := stack(transpose(transpose(PIR_V)[:, 0]), transpose(transpose(PIR_V)[:, 1]), transpose(transpose(PIR_V)[:, 3])) = [
    2.71892, 0, 1.26785, 0.906308, 0, 0.422618;
    0.896509, 0, -1.92257, 2.42016, 2.12132, 1.48046;
    1, 1, 1, 1, 1, 1
]
# Определяем координаты проекции вершин треугольника сечения Р1, Р2, Р3 на картинную плоскость (без координат по Z)
TR_XY := stack(transpose(transpose(TR_V)[:, 0]), transpose(transpose(TR_V)[:, 1]), transpose(transpose(TR_V)[:, 3])) = [2.39738, 0.633927, 0; 1.16679, 0.629706, 1.59099; 1, 1, 1]
# Определяем область проекции пирамиды на картинную плоскость XY ВСК
x_L := min(transpose(P_XY)[:, 0]) = 0
y_H := max(transpose(P_XY)[:, 1]) = 2.42016
# – левый верхний угол
x_L = 0
y_H = 2.42016
x_H := max(transpose(P_XY)[:, 0]) = 2.71892
y_L := min(transpose(P_XY)[:, 1]) = -1.92257
# – правый нижний угол
x_H = 2.71892
y_L = -1.92257
# Координаты в ОСК:
x_LW := 0
y_LW := 100
x_HW := 800
y_HW := 700
# Вычисляем параметры для формирования матрицы пересчета координат из плоскости XY ВСК в ОСК
Δx_W := x_HW - x_LW = 800
Δx := x_H - x_L = 2.71892
Δy_W := y_HW - y_LW = 600
Δy := y_H - y_L = 4.34273
k_x := Δx_W/Δx = 294.234
k_y := Δy_W/Δy = 138.162
T_SW := [k_x, 0, x_LW - k_x*x_L; 0, -k_y, y_HW + k_y*y_L; 0, 0, 1]  # – матрица пересчета из ВСК в ОСК
# Вычисляем координаты вершин пирамиды в ОСК
M_W := T_SW*P_XY = [800, 0, 373.046, 266.667, 0, 124.349; 310.51, 434.374, 700, 100, 141.288, 229.83; 1, 1, 1, 1, 1, 1]
[x_c, x_b, x_a, x_c1, x_b1, x_a1; y_c, y_b, y_a, y_c1, y_b1, y_a1; q, q, q, q, q, q] := vectorize(round(M_W)) = [800, 0, 373, 267, 0, 124; 311, 434, 700, 100, 141, 230; 1, 1, 1, 1, 1, 1]
# Формируем массивы координат X и Y для рисования пирамиды
X := transpose([x_c, x_b, x_a, x_c, x_c1, x_b1, x_b, x_b1, x_a1, x_a, x_a1, x_c1])
Y := transpose([y_c, y_b, y_a, y_c, y_c1, y_b1, y_b, y_b1, y_a1, y_a, y_a1, y_c1])
# Вычисляем оконные координаты вершин треугольника сечения Р1, Р2, Р3
TR_W := T_SW*TR_XY = [705.391, 186.523, 0; 273.167, 347.372, 214.559; 1, 1, 1]
[x_p1, x_p2, x_p3; y_p1, y_p2, y_p3; q, q, q] := vectorize(round(TR_W)) = [705, 187, 0; 273, 347, 215; 1, 1, 1]
# Формируем массивы координат Х и У для рисования сечения пирамиды
XC := transpose([x_p1, x_p2, x_p3, x_p1])
YC := transpose([y_p1, y_p2, y_p3, y_p1])
# Вычисляем декартовы координаты камеры (вектора, определяющего положение камеры)
R_C := [r_v*sin(θ_v)*cos(ϕ_v); r_v*sin(θ_v)*sin(ϕ_v); r_v*cos(θ_v)] = [6.40856; -2.98836; 7.07107]
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# График без удаления граней
# Координаты векторов AC и AA1 (x, y, z):
AC := [pC[0]; pC[1]; pC[2]] - [pA[0]; pA[1]; pA[2]] = [-3; 3; 0]
AA1 := [pA1[0]; pA1[1]; pA1[2]] - [pA[0]; pA[1]; pA[2]] = [-2; 0; 3]
N_AA1C1C := AC×AA1 = [9; 9; 6]
# - вектор внешней нормали к грани AA1C1C
A1B1 := [pB1[0]; pB1[1]; pB1[2]] - [pA1[0]; pA1[1]; pA1[2]] = [-1; 0; 0]
A1C1 := [pC1[0]; pC1[1]; pC1[2]] - [pA1[0]; pA1[1]; pA1[2]] = [-1; 1; 0]
N_A1B1C1 := A1B1×A1C1 = [0; 0; -1]
AB := [pB[0]; pB[1]; pB[2]] - [pA[0]; pA[1]; pA[2]] = [-3; 0; 0]
AC := [pC[0]; pC[1]; pC[2]] - [pA[0]; pA[1]; pA[2]] = [-3; 3; 0]
N_ABC := AB×AC = [0; 0; -9]
N_AA1B1B := AA1×AB = [0; -9; 0]
BB1 := [pB1[0]; pB1[1]; pB1[2]] - [pB[0]; pB[1]; pB[2]] = [0; 0; 3]
BC := [pC[0]; pC[1]; pC[2]] - [pB[0]; pB[1]; pB[2]] = [0; 3; 0]
N_BB1C1C := BB1×BC = [-9; 0; 0]
# Определяем видимость граней пирамиды:
q1 := N_AA1C1C*R_C = 73.2082
s1 := if(q1 ≥ 0, "Грань AA1C1C видна", "Грань AA1C1C не видна") = "Грань AA1C1C видна"
q2 := N_AA1B1B*R_C = 26.8953
s2 := if(q2 ≥ 0, "Грань AA1B1B видна", "Грань AA1B1B не видна") = "Грань AA1B1B видна"
q3 := N_BB1C1C*R_C = -57.6771
s3 := if(q3 ≥ 0, "Грань BB1C1C видна", "Грань BB1C1C не видна") = "Грань BB1C1C не видна"
q4 := N_ABC*R_C = -63.6396
s4 := if(q4 ≥ 0, "Грань ABC видна", "Грань ABC не видна") = "Грань ABC не видна"
q5 := N_A1B1C1*R_C = -7.07107
s5 := if(q5 ≥ 0, "Грань A1B1C1 видна", "Грань A1B1C1 не видна") = "Грань A1B1C1 не видна"
Xs := transpose([x_a, x_a1, x_c1, x_c, x_a, x_a1, x_b1, x_b, x_a, x_a1, x_b1, x_c1])
Ys := transpose([y_a, y_a1, y_c1, y_c, y_a, y_a1, y_b1, y_b, y_a, y_a1, y_b1, y_c1])
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# Пирамида без удаления граней и её сечение
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